// SBML level 3 version 2

model feedback()

  // Compartments:
  compartment default_compartment = 1;

  // Species:
  species N in default_compartment = init_N;
  species E in default_compartment = init_E;
  species S in default_compartment = init_S;
  species M in default_compartment = init_M;
  species P in default_compartment = init_P;

  // Parameters:
  init_N = 1;
  init_E = 1;
  init_S = 1;
  init_M = 1;
  init_P = 1;
  mu_N = 1;
  mu_EE = 1;
  mu_LE = 1;
  mu_LL = 1;
  mu_M = 1;
  mu_P = 1;
  mu_PE = 1;
  mu_PL = 1;
  delta_NE = 1;
  delta_EL = 1;
  delta_LM = 1;
  rho_E = 1;
  rho_P = 1;

  // Assignment rules:
  obs_y1 := N;
  obs_y2 := E;
  obs_y3 := S + M;
  obs_y4 := P;

  // Rate rules:
  N' = -mu_N*N - delta_NE*N*P;
  E' = -delta_EL*E + delta_NE*N*P - mu_EE*E*E + rho_E*E*P;
  S' = delta_EL*S - delta_LM*S - mu_LE*E*S - mu_LL*S*S;
  M' = delta_LM*S - mu_M*M;
  P' = -mu_P*P - mu_PE*E*P - mu_PL*S*P + rho_P*P*P;
end
