// SBML level 3 version 2

model feedback()

  // Compartments:
  compartment default_compartment = 1;

  // Species:
  species i in default_compartment = init_i;
  species r in default_compartment = init_r;
  species s in default_compartment = init_s;
  species x1 in default_compartment = init_x1;
  species x2 in default_compartment = init_x2;

  // Parameters:
  init_i = 1;
  init_r = 1;
  init_s = 1;
  init_x1 = 1;
  init_x2 = 1;
  b0 = 1;
  b1 = 1;
  g = 1;
  M = 1;
  mu = 1;
  nu = 1;

  // Assignment rules:
  obs_y1 := i;
  obs_y2 := r;

  // Rate rules:
  i' = -(mu + nu)*i + b0*(1 + b1*x1)*i*s;
  r' = -(g + mu)*r + nu*i;
  s' = mu + g*r - mu*s - b0*(1 + b1*x1)*i*s;
  x1' = -M*x2;
  x2' = M*x1;
end
