// SBML level 3 version 2

model feedback()

  // Compartments:
  compartment default_compartment = 1;

  // Species:
  species xA in default_compartment = init_xA;
  species xB in default_compartment = init_xB;
  species xC in default_compartment = init_xC;
  species eA in default_compartment = init_eA;
  species eC in default_compartment = init_eC;

  // Parameters:
  init_xA = 1;
  init_xB = 1;
  init_xC = 1;
  init_eA = 1;
  init_eC = 1;
  k1 = 1;
  k2 = 1;
  eB = 1;

  // Assignment rules:
  obs_y1 := xC;
  obs_y2 := eB*xB + xA*eA + xC*eC;
  obs_y3 := eA;
  obs_y4 := eC;

  // Rate rules:
  xA' = -k1*xA;
  xB' = k1*xA - k2*xB;
  xC' = k2*xB;
  eA' = 0;
  eC' = 0;
end
