// SBML level 3 version 2

model feedback()

  // Compartments:
  compartment default_compartment = 1;

  // Species:
  species In in default_compartment = init_In;
  species N in default_compartment = init_N;
  species S in default_compartment = init_S;
  species Tr in default_compartment = init_Tr;

  // Parameters:
  init_In = 1;
  init_N = 1;
  init_S = 1;
  init_Tr = 1;
  a = 1;
  b = 1;
  d = 1;
  g = 1;
  nu = 1;

  // Assignment rules:
  obs_y1 := Tr;
  obs_y2 := N;

  // Rate rules:
  In' = b*S*In/N + b*d*S*Tr/N - (a + g)*In;
  N' = 0;
  S' = -b*S*In/N + (-b*d*S*Tr/N);
  Tr' = g*In - nu*Tr;
end
