// SBML level 3 version 2

model feedback()

  // Compartments:
  compartment default_compartment = 1;

  // Species:
  species x in default_compartment = init_x;
  species y in default_compartment = init_y;
  species v in default_compartment = init_v;
  species w in default_compartment = init_w;
  species z in default_compartment = init_z;

  // Parameters:
  init_x = 1;
  init_y = 1;
  init_v = 1;
  init_w = 1;
  init_z = 1;
  lm = 1;
  d = 1;
  beta = 1;
  a = 1;
  k = 1;
  u = 1;
  c = 1;
  q = 1;
  b = 1;
  h = 1;

  // Assignment rules:
  obs_y1 := w;
  obs_y2 := z;
  obs_y3 := x;
  obs_y4 := v + y;

  // Rate rules:
  x' = lm - d*x - beta*x*v;
  y' = -a*y + beta*x*v;
  v' = k*y - u*v;
  w' = -b*w - c*q*y*w + c*x*y*w;
  z' = -h*z + c*q*y*w;
end
